*Heading
** Job name: Job-1 Model name: Model-1
** Generated by: Abaqus/CAE 6.14-5
*Preprint, echo=NO, model=NO, history=NO, contact=NO
**
** PARTS
**
*Part, name=Part-1
*Node
      1,           1.,           1.,           1.
      2,           1.,           0.,           1.
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*Element, type=C3D4
  1, 57, 58, 59, 60
  2, 57, 59, 58, 42
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*End Part
**
**
** ASSEMBLY
**
*Assembly, name=Assembly
**
*Instance, name=Part-1-1, part=Part-1
*End Instance
**
*Nset, nset=Set-1, instance=Part-1-1
  5,  6,  7,  8, 19, 20, 23, 24, 29, 30, 31, 32, 53, 54, 55, 56
*Elset, elset=Set-1, instance=Part-1-1
  24,  31,  44,  47,  59,  64
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*Elset, elset=_Surf-1_S3, internal, instance=Part-1-1
  72, 126, 170, 177, 181, 184, 186, 216, 221, 234, 241, 244, 249, 250, 251, 253
*Elset, elset=_Surf-1_S4, internal, instance=Part-1-1
 231,
*Elset, elset=_Surf-1_S1, internal, instance=Part-1-1
 240,
*Surface, type=ELEMENT, name=Surf-1
_Surf-1_S3, S3
_Surf-1_S4, S4
_Surf-1_S1, S1
*End Assembly
** ----------------------------------------------------------------
**
** STEP: Step-1
**
*Step, name=Step-1, nlgeom=NO
*Static
1., 1., 1e-05, 1.
**
** BOUNDARY CONDITIONS
**
** Name: BC-1 Type: Displacement/Rotation
*Boundary
Set-1, 1, 1
Set-1, 2, 2
Set-1, 3, 3
**
** LOADS
**
** Name: Load-1   Type: Pressure
*Dsload
Surf-1, P, -6.781e+06
**
** OUTPUT REQUESTS
**
*Restart, write, frequency=0
**
** FIELD OUTPUT: F-Output-1
**
*Output, field, variable=PRESELECT
**
** HISTORY OUTPUT: H-Output-1
**
*Output, history, variable=PRESELECT
*End Step
