*Heading
** Job name: Job-20-20-8 Model name: Model-1
** Generated by: Abaqus/CAE 2017
*Preprint, echo=NO, model=NO, history=NO, contact=NO
**
** PARTS
**
*Part, name=Part-1
*Node
      1,           5.,           5.,           2.
      2,           5.,         4.75,           2.
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*Element, type=C3D8R
   1,  190,  191,  212,  211,    1,    2,   23,   22
   2,  191,  192,  213,  212,    2,    3,   24,   23
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*Nset, nset=Set-7, generate
    1,  3969,     1
*Elset, elset=Set-7, generate
    1,  3200,     1
** Section: Section-1
*Solid Section, elset=Set-7, material=Material-1
,
*End Part
**
**
** ASSEMBLY
**
*Assembly, name=Assembly
**
*Instance, name=Part-1-1, part=Part-1
*End Instance
**
*Nset, nset=BOTTOM, instance=Part-1-1, generate
   21,  3969,    21
*Elset, elset=BOTTOM, instance=Part-1-1, generate
   20,  3200,    20
*Nset, nset=TOP, instance=Part-1-1, generate
    1,  3949,    21
*Elset, elset=TOP, instance=Part-1-1, generate
    1,  3181,    20
*End Assembly
**
** MATERIALS
**
*Material, name=Material-1
*Elastic
 1e+09, 0.3
** ----------------------------------------------------------------
**
** STEP: Step-1
**
*Step, name=Step-1, nlgeom=NO
*Static
1., 1., 1e-05, 1.
**
** BOUNDARY CONDITIONS
**
** Name: BC-1 Type: Symmetry/Antisymmetry/Encastre
*Boundary
BOTTOM, ENCASTRE
** Name: BC-2 Type: Displacement/Rotation
*Boundary
TOP, 2, 2, -0.001
**
** OUTPUT REQUESTS
**
*Restart, write, frequency=0
**
** FIELD OUTPUT: F-Output-1
**
*Output, field, variable=PRESELECT
**
** HISTORY OUTPUT: H-Output-1
**
*Output, history, variable=PRESELECT
*End Step
